f(x) := 35*cos(x)^2 - 2*cos(x) - 1
# ОДЗ: х є R
# Знайдемо похідну:
d/dx(f(x)) → 2*sin(x) - 70*cos(x)*sin(x)
# Прирівняємо похідну до нуля:
2*sin(x) - 70*cos(x)*sin(x) == 0
# Критичні точки:
[0; acos(1/35); -acos(1/35)]
# Побудуємо графік функції похідної:
k(x) := 2*sin(x) - 70*cos(x)*sin(x)
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# З даного графіка методом інтервалів визначимо інтервали спадання та зростання функції:
# Функція спадає: (-π + 2πn;  -acos(1/35) + 2πn) ∪ (0 + 2πn; + acos(1/35) + 2πn)
# Функція зростає: (-acos(1/35) + 2πn;  0 + 2πn) ∪ (+ acos(1/35) + 2πn; π + 2πn )
# Графік функції f(x):
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g(x) := cos(x)^2 - 2/5*cos(x) + 1/25
# ОДЗ: х є R
# Знайдемо похідну:
d/dx(g(x)) → 2*sin(x)/5 - 2*cos(x)*sin(x)
# Прирівняємо похідну до нуля:
2*sin(x)/5 - 2*cos(x)*sin(x) == 0
# Критичні точки:
[0; acos(1/5); -acos(1/5)]
# Побудуємо графік функції похідної:
l(x) := 2*sin(x) - 70*cos(x)*sin(x)
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# З даного графіка методом інтервалів визначимо інтервали спадання та зростання функції:
# Функція спадає: (-π + 2πn;  -acos(1/5) + 2πn) ∪ (0 + 2πn; + acos(1/5) + 2πn)
# Функція зростає: (-acos(1/5) + 2πn;  0 + 2πn) ∪ (+ acos(1/5) + 2πn; π + 2πn )
# Графік функції g(x):
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# Знайдемо корені функції f(x):
35*cos(x)^2 - 2*cos(x) - 1 == 0
acos(1/5) = 1.36944
[acos(1/5); -acos(1/5); π + acos(1/7); π - acos(1/7)]
-acos(1/5) = -1.36944
π + acos(1/7) = 4.56904
π - acos(1/7) = 1.71414
# Знайдемо корені функції g(x):
cos(x)^2 - 2/5*cos(x) + 1/25 == 0
acos(1/5) = 1.36944
[acos(1/5); -acos(1/5)]
-acos(1/5) = -1.36944
