f(x) := tan(47/100*x + 1/5) - x^2
# Знайдемо похідну
d/dx(f(x)) → (47*tan((47*x + 20)/100)^2 + 47)/100 - 2*x
# Прирівняємо похідну до нуля та знайдемо корені рівняння похідної:
(47*tan((47*x + 20)/100)^2 + 47)/100 - 2*x == 0 solve → 0.261295749827
# Функція f(x) зростає: ()∪()
# Функція спадає: ()
tan(47/100*x + 1/5) - x^2 solve → -0.270326294773
# Графік функції f(x)
# [plot: f(x) vs x]
g(x) := x^3 + 2*x^2 + x - 1
# Знайдемо похідну
d/dx(g(x)) → 3*x^2 + 4*x + 1
# Прирівняємо похідну до нуля та знайдемо корені рівняння похідної
3*x^2 + 4*x + 1 == 0 solve → [-1; -1/3]
# Функція f(x) зростає: (-∞; -1)∪(1/3; +∞)
# Функція спадає: (-1; -1/3)
# Знайдемо корені рівняння:
x^3 + 2*x^2 + x - 1 solve → [-1.23278561594 + 0.792551992515i; -1.23278561594 - 0.792551992515i; 0.465571231877]
# Графік функції f(x)
# [plot: g(x) vs x]
k(x) := sqrt(log(x + 2))
# Знайдемо похідну:
d/dx(k(x)) → sqrt(ln(10))/((2*x + 4)*ln(10)*sqrt(ln(x + 2)))
# Знайдемо корені рівняння
sqrt(log(x + 2)) solve → -1
# Графік функції k(x):
# [plot: k(x) vs x]
l(x) := x^3 + 3*x^2 + 6*x - 1
# Знайдемо похідну:
d/dx(l(x)) → 3*x^2 + 6*x + 6
t(x) := 3*x^2 + 6*x + 6
# Знайдемо корені рівняння:
x^3 + 3*x^2 + 6*x - 1 solve → [-1.57708574759 + 1.99977095694i; -1.57708574759 - 1.99977095694i; 0.154171495181]
# Побудуємо графік похідної:
# [plot: t(x) vs x]
# Графік функції l(x):
# [plot: l(x) vs x]
