f(x) := x^3 + 2*x^2 + x - 1
# Знайдемо похідну
d/dx(f(x)) → 3*x^2 + 4*x + 1
# Прирівняємо похідну до нуля та знайдемо корені рівняння похідної
3*x^2 + 4*x + 1 == 0 solve → [-1; -1/3]
# Функція f(x) зростає: (-∞; -1)∪(1/3; +∞)
# Функція спадає: (-1; -1/3)
# Графік функції f(x)
# [plot: f(x) vs x]
g(x) := tan(47/100*x + 1/5) - x^2
# Знайдемо похідну
d/dx(g(x)) → (47*tan((47*x + 20)/100)^2 + 47)/100 - 2*x
# Прирівняємо похідну до нуля та знайдемо корені рівняння похідної
(47*tan((47*x + 20)/100)^2 + 47)/100 - 2*x == 0 solve → 0.261295749827
# Функція f(x) зростає: ()∪()
# Функція спадає: ()
# Графік функції f(x)
# [plot: g(x) vs x]
k(x) := x^3 + 3*x^2 + 6*x - 1
# Знайдемо похідну
d/dx(k(x)) → 3*x^2 + 6*x + 6
# Прирівняємо похідну до нуля та знайдемо корені рівняння похідної
3*x^2 + 6*x + 6 == 0 solve → [1i - 1; -1i - 1]
# Функція f(x) зростає: (-∞; -1)∪(1/3; +∞)
# Функція спадає: (-1; -1/3)
# Графік функції f(x)
# [plot: k(x) vs x]
l(x) := sqrt(ln(x + 2))
# Знайдемо похідну
d/dx(l(x)) → 1/((2*x + 4)*sqrt(ln(x + 2)))
# Прирівняємо похідну до нуля та знайдемо корені рівняння похідної
1/((2*x + 4)*sqrt(ln(x + 2))) == 0 solve →  # error: Решение не было найдено.
# Функція f(x) зростає: (-∞; -1)∪(1/3; +∞)
# Функція спадає: (-1; -1/3)
# Графік функції f(x)
# [plot: l(x) vs x]
